# Concept Design Validation using Mathcad Prime
#
# As an illustration of engineering calculations in conceptual design, this worksheet will help you to assess the viability of the concept design for the robot arm based on the torque requirements during the lift.
#
# Design Specifications
# Using Creo, you built a working concept model for a lifting mechanism. In this worksheet we will consider the feasibility of the design in relation to the motors and gears that we have available in the kit of parts. Our engineering task is to ensure that we can provide sufficient torque to lift the load.
#
# Important Considerations
# 1. Engineering best practice requires us to identify and consider the scenario where the torque required is greatest.The greatest amount of torque is required when the arm is in a horizontal position. At this stage of the product development process we will calculate the torque required to lift the arm at maximum torque.
#
# 2. We need to account for the fact that the arm is extendable. The worksheet will perform calculations at the minimum and maximum length of the arm.
#
# 3. Since we may want to perform these calculations again on a different design, we will use parameters (variables) to make the worksheet reusable. Creating a resuable worksheet requires careful documentation. The given information and input parameters are specificed on page 2 of the worksheet.
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# Model Identification
#
# Filename:
#
# Version Date:
# Input Parameters
# Arm Measurements
# Properties of arm.prt
length_prt := 40 in
# Old Gripper Assembly
m_gripper := 11 lb  # Estimated
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# Source: Team 525 2011 Robot
# We will need a mechanical gripping device attached to the end of our arm. We can use an old gripper to estimate the mass we might attach to the arm.
# Gravitational Acceleration Constant
# (Mathcad built-in constant)
g = 9.80665 m/s^2
# Maximum Force Applied to the Load
F_load := m_gripper*g = 48.9304 N
# Robotic Arm Length
# Retracted
l_min := 40*in  # Estimated
# Extended
l_max := 60*in
# Step 2:  Draw a free body diagram for the concept model. For the present assume that the mass of the arm is inconsequential.
# [Excel component]
# Description:
# We will calculate the torque required to lift the gripper at the end of the arm in order to establish initial criteria for the design of a motor and gearbox.
#
# We will calculate two different torque values to set a range based on the concept of using an extendable arm.
# Torque Calculations
# Torque is defined as the cross product of the radius vector with the force vector.  In our case, because the two vectors are perpendicular, the equation reduces to a normal (multiplicative) product. We can calculate the torque as the arm length times the weight of the load.
r_arm := [l_min; l_max]
τ_req := r_arm*F_load = [49.7133; 74.57] N*m
τ_req[0] = 49.7133 N*m  # is the torque required at 40 in extension
τ_req[1] = 74.57 N*m  # is the torque required at 60 in extension
# Motor Candidate:  AndyMark (am-0914)
τ_motor := g*3101 oz*in = 21.8979 N*m  # from the FIRST 2012 kit-of-parts
Motor_fs := 84 rpm  # from the FIRST 2012 kit-of-parts
P_max := 48.50 W  # from the FIRST 2012 kit-of-parts
# We can increase the torque from the motor by utilizing a gearbox.  A gearbox employs a set of gears with different numbers of teeth to increase/decrease the speed, which in turn decreases/increases the torque.
#
# The gear ratio is typically defined as the ratio of the number of teeth on the driven gear to the number of teeth on the driving gear.  In our case, we have the the torque required to lift the load and the motor torque.  We re-define the gear ratio as the torque on the driving gear (gear attached to the motor) to the driven gear (gear attached to the arm).
GR_req := τ_motor/τ_req = [0.440483; 0.293655]
1/GR_req = [2.27024; 3.40535]
# We need to increase the torque by a factor of 3.5 or more to be able to lift the arm when fully extended with our current estimates.
# Since we have gears of three different sizes, we can generate three gear ratios from the following three base ratios.  From these three base ratios, we can generate more ratios by multiplying any of the base ratios.
gr_1 := 40/80 = 0.5
gr_2 := 40/120 = 0.333333
gr_3 := 80/120 = 0.666667
# Consider the following gear box:
gr_lift := gr_2*gr_3 = 0.222222
# If we use this ratio in the design of a gear box, the motor can now provide more torque on the end of the arm, but at a slower speed.
τ_effective == 1/gr_lift*τ_motor
speed_effective == gr_lift*speed_motor
τ_motor = 21.8979 N*m  # Amount of Torque provided by the motor
τ_effective := 1/gr_lift*τ_motor = 98.5404 N*m
τ_req = [49.7133; 74.57] N*m  # Estimated range of torque required to lift the load
τ_effective > τ_req[1] = 1  # Is the torque provided by the motor with the gearbox in place larger than the required torque?
# We now know that the motor can provide enough torque to lift the scoop in the worst case scenario, i.e. the horizontal position.  Next we should see if the speed is acceptable.
v_g := Motor_fs = 84 rpm
v_calc := v_g*gr_lift = 18.6667 rpm
radius := 60 in
v_arm := v_calc*radius = 2.97907 m/s  # at full extension
# If the speed is acceptable, then we can move on with the modelling.  Keep in mind that this is an estimate.  We have not accounted for mass of the arm and scoop, losses in the gears, motor efficiency, etc.  It does, however, give us a good approximation of what gear ratio(s) to employ instead of trial and error.
