# Project: Ball Launch Mechanism Performance Test | Engineering Team: Bucky, Herb, Suzie, Ron, Donna
# Engineering Task:
# The launch mechanism is currently mounted on a table so that the release point for the shot is 7 feet above the floor. The test involves shooting five basketballs from four measured distances (6 ft, 8 ft, 10 ft, 12 ft) from a wall. Previous tests have shown that the ball will travel towards the wall in a trajectory that remains within +/- 10 degrees of perpendicular. The testing team will mark the height at which each ball strikes the wall and collect this height data for analysis.
# Given Measurements: We collected the data in the gym on April 19. You can view the data in the hidden region below.
table  # each column defines a variable
    Distance (ft) | Height (ft)
    6 | 12
    6 | 12.5
    6 | 11
    6 | 8
    6 | 11.75
    8 | 11
    8 | 9.75
    8 | 10.5
    8 | 12
    8 | 10.75
    10 | 7
    10 | 6.5
    10 | 5
    10 | 7
    10 | 6.75
    12 | 4
    12 | 3.25
    12 | 3.5
    12 | 3.75
    12 | 3.5
end table
# Plot of the Height of the Ball when it struck the wall Distance from the Launcher.
# [plot: Height (ft) vs Distance (ft)]
# Launch Height:
# Procedure: As the plot shows, 5 shots were taken from each of the distances shown on the x-axis. The height at which the ball struck the wall was marked after each shot. After all 5 shots from a distance the heights were measured and recorded.
h_0 := 7 ft
# Regression Analysis:
# Terms in the desired model:
V(x) := [x^2; x; 1]
# Regression Function:
C := linfit(Distance, Height, V)
# Regression Coefficients:
C = [-0.533136 1/m; 1.59; 2.32867 m]
# The coefficients are defined in vector matrix C
H_pred(d) := C[0]*d^2 + C[1]*d + C[2]  # where d has units ft
# Plot of the Regression Model with the Performance Data
x_d := 0 ft, 0.5 ft .. 15 ft
# [plot: H_pred(x_d) (ft), Height (ft) vs x_d (ft), Distance (ft)]
# The red line on the plot shows the height of the top basket.
