# Torque & Velocity Calculations
# Calculating desired torque and velocity, applying gear ratios to torque and velocity calculations.
# Description:
# This worksheet demonstrates Torque and Velocity Calculations based on  design parameters including gearing ratio and gearing efficiency.
# Motor Specifications
#
# Torque Output at 10000 rpm
torque_G := 3 lb*in
v_G := 10000 rpm
# Calculate the torque at v = 400 rpm
# Target Velocity
v_T := 400 rpm
torque_G*v_G == torque_T*v_T
torque_T := torque_G*v_G == torque_T*v_T solve, torque_T → 75*lb*in
# Plot the torque for the range from v = 250 rpm to v = 500 rpm
T(v) := torque_G*v_G == torque_T*v solve, torque_T, explicit → v_G*torque_G/v
v := 250 rpm, 260 rpm .. 500 rpm
# [plot: T(v) (lb*in) vs v (rpm)]
# Calculate the velocity required to produce 5 lb*in of force
torque_T := 5 lb*in
v_T := torque_G*v_G == torque_T*v_T solve, v_T, explicit → v_G*torque_G/torque_T
v_T = 6000 rpm
# Plot the velocities required to produce 10 lb*in to 100 lb*in of force
torque := 10 lb*in, 20 lb*in .. 100 lb*in
velocity(torque) := v_G*torque_G/torque
# Enter the desired torque:
torque_T := 20 lb*in
velocity(torque_T) = 1500 rpm
t_mark := torque_T/(lb*in)
v_mark := velocity(torque_T)/rpm
# [plot: velocity(torque) (rpm) vs torque (lb*in)]
# Gearing Calculations
# Formulas:
torque_output == r_gear*torque_input
velocity_output == velocity_input/r_gear
# r_gear | is the gear ratio
# Calculate the torque and the velocity for the given configurations
# Values generated for gear calculations
v_test := [700; 500; 450; 400; 95] rpm
T(v_test) = [42.8571; 60; 66.6667; 75; 315.789] lb*in
table  # each column defines a variable
    r_gear | v_input (rpm) | t_input (lb*in)
    2/3 | 700 | 42.857
    1/3 | 500 | 60
    3/2 | 450 | 66.667
    3/1 | 400 | 75
    1/2 | 95 | 315.789
end table
torque_output := vectorize(r_gear*t_input) = [28.5713; 20; 100.001; 225; 157.894] lb*in
velocity_output := vectorize(v_input/r_gear) = [1050; 1500; 300; 133.333; 190] rpm
# Excel Table with Summary of Calculations
# (Note: Unit conversions were added to the input statements in the Excel Component.)
# [Excel component]
    excel["Sheet1!A3:A7"] := r_gear
    excel["Sheet1!B3:B7"] := v_input*60/(2*π)
    excel["Sheet1!C3:C7"] := velocity_output*60/(2*π)
    excel["Sheet1!D3:D7"] := t_input*m/in*kg/lb
    excel["Sheet1!E3:E7"] := torque_output*m/in*kg/lb
