# Calculating the Force Required to Lower the Ramp
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# In this year's FIRST Rebound Rumble game one of the challenges is to use the ramps effectively to:
#
# (1) Traverse the field of play
# (2) Score points at the end of the competition
#
# In order to do so your robot must have the ability to lower the ramp in order to climb on board.
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# From the FIRST Rebound Rumble Game Manual:
# Placing two standard kit batteries a distance of 30 inches from the midline of the ramp will provide enough force to lower the ramp.
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W_bat := 14 lb
Dist_bat := 30 in
n_bat := 2
Moment := W_bat*n_bat*Dist_bat
Moment = 840 lb*in
# Summary: A moment of 840 lb*in is sufficient to lower the ramp. Considering the ramp as a lever, the moment can be achieved with less force further from the midline of the ramp.
# Modeling the Force Required to Lower the Ramp
D := 25 in, 31 in .. 44 in
# The ramp is 88 inches in length, the force can be applied up to 44 inches from the midline. D is a  range variable that allows us to model distances from 30 in to 44 in.
F_M(D) := Moment/D
# where
Moment = 840 lb*in  # based on prior analysis
# Enter the distance from the midline of the ramp that your robot will apply the downforce:
D_C := 42 in
F_M(D_C) = 20 lb
M_v := D_C/in
M_h := F_M(D_C)/lb
# Mv and Mh are given as inputs to the markers on the plot. Markers must be unitless, so these calculations strip the units from the markers so that plot updates when Dc is changed.
# Plot of Force Required vs. Distance from the Midline of the Ramp
# [plot: F_M(D) (lb) vs D (in)]
# Using the Plot:
# Changing the value assigned to Dc above will calculate a new value for Fm.
#
# The horizontal and vertical markers on the plot adjust automatically.
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# Appendix:  Data for Distance from Midline and Weight required to lower the ramp
# Distance from Midline | Weight
D = [25; 31; 37; 43] in
F_M(D) = [33.6; 27.0968; 22.7027; 19.5349] lb
