# FIRST Team 53711, the Blasting Badgers, are testing a shooting mechanism for their robot to assess its performance. The mechanism is currently mounted on a table so that the release point for the shot is 7 feet above the floor. The test involves shooting five basketballs from four measured distances (6 ft, 8 ft, 10 ft, 12 ft). Previous tests have shown that the ball will travel towards the wall in a trajectory that remains within +/- 3 degrees of perpendicular. The testing team will mark the height at which each ball strikes a wall and use this data to assess the shooting range for this mechanism.
table  # each column defines a variable
    Distance (ft) | Height (ft)
    6 | 12
    6 | 12.5
    6 | 11
    6 | 8
    6 | 11.75
    8 | 11
    8 | 9.75
    8 | 10.5
    8 | 12
    8 | 10.75
    10 | 7
    10 | 6.5
    10 | 5
    10 | 7
    10 | 6.75
    12 | 4
    12 | 3.25
    12 | 3.5
    12 | 3.75
    12 | 3.5
end table
# Plot of the Distance vs. Height Data
# [plot: Height (ft) vs Distance (ft)]
V(x) := [x^2; x; 1]
C := linfit(Distance/ft, Height/ft, V)
C := C*ft
C = [-0.1625; 1.59; 7.64] ft
H_pred(d) := C[0]*d^2 + C[1]*d + C[2]
# Distance form the Target
x_d := 0, 1 .. 15
# Basket Heights Shown in Red
# [plot: Height (ft), H_pred(x_d) (ft) vs Distance (ft), x_d]
