# Homework set #1:
# Designing your own automobile suspension
#
# Objectives:  1. To learn how to use ordinary differential equations to predict an  automobile's suspension and to design the suspension for a specified performance.
# 2. To bridge the gap between mathematics and real applications
#
# Description:
# The suspension of a car can be modeled as a simple mass-spring-dashpot system. Assuming that the mass of the car can be lumped into a single mass and the springs and shock absorbers can be lumped as well into single units, the whole system can be simplified into a system with one mass, one dashpot (shock absorber), and one spring as shown.
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# Where: M = Mass of the car, C = viscous damping in the suspension, and K = the springs in the suspension system. Doing a sum of forces produces the following equation:
sum(F) == 0 == M*d^2/dt^2(y(t)) + C*d/dt(y(t)) + K*y(t)
# The sum of forces produces a linear differential equation that is equal to zero if there is no forcing function. So we assume a solution of the form:
y(t) := e^(λ*t)  # error: This variable is undefined. Check that the label is set correctly.
d/dt(y(t)) → λ*e^(t*λ)
d^2/dt^2(y(t)) → λ^2*e^(t*λ)
# Inserting these into the Homogeneous differential equation gives:
e^(λ*t)*(M*λ^2 + C*λ + K) = 0
# The quadratic equation between the brackets is called the "characteristic equation" and it has two roots:
λ_1 == (-C + sqrt(C^2 - 4*M*K))/(2*M)
λ_2 == (-C - sqrt(C^2 - 4*M*K))/(2*M)
# There are three cases:
# 1. The roots are real and unequal (Overdamped system)
# 2. The roots are real and equal (Critically damped system)
# 3. The roots are complex (Underdamped system)
# Assignment:
#
# You are to choose which case is best for your suspension and then tune the damping and spring constant with respect to the mass to make your suspension produce a comfortable yet responsive ride.
# OVERDAMPED SOLUTION:
#
# 2 real and unequal roots: This is when the damping in the system is relatively larger than the mass and springs. The system is considered to be over damped. Assume we normalize the physical constants of the system by dividing by the mass M. The equations change slightly but allow you to design your suspension without worrying about the actual values of the Mass, Dashpot, or Spring.
#
# The general solution is:
# Let us start with generic values for the physical constants
M := 1 lb*s^2/ft
C := 3 lb*s/ft
K := 1 lb/ft
# Now let's normalized by defining some artifical variables:
ω_n := sqrt(K/M)
# The natural frequency of the suspension
ζ := 1/2*C/K  # The damping coefficient of the suspension
# The quadratic equations now become:
λ_1 := ω_n*(-ζ + sqrt(ζ^2 - 1 s^2))
λ_1 = -0.381966
λ_2 := ω_n*(-ζ - sqrt(ζ^2 - 1 s^2))
λ_2 = -2.61803
# Now assume that the boundary conditions of the system are that the mass is extended 1 foot and held constant so there is no initial velocity and then it is let go. This would mean that:
y(0) == 1*ft
d/dt(y(0)) == 0*ft/s
# The constants of integration would then be:
a_2 := -λ_1/(λ_2 - λ_1)
a_1 := (1 - a_2)
a_1 = 1.17082
a_2 = -0.17082
# The final solution would be:
y(t) := a_1*e^(λ_1*t) + a_2*e^(λ_2*t)
y(0) = 1
y(4) = 0.254062
y(10) = 0.0256822
# Plotting the response:
t := 0, 0.1 .. 10
# [plot: y(t) vs t]
# Now calculate how long it takes for the mass to return to 90% of the original position.
# CRITICALLY DAMPED SOLUTION:
#
# This is when the damping of the system is relatively equally matched with the mass and springs. This creates two real and equal roots. This is called critically damped because any slight change in the values of the physical constants and the system becomes either overdamped or underdamped.
#
# Let's assume the physical constants have values:
M := 1 lb*s^2/ft
C := 2 lb*s/ft
K := 1 lb/ft
# Therefore:
ω_n := sqrt(K/M)
ω_n = 1 1/s
ζ := 1/2*C/K
ζ = 1 s
# The quadratic equations now become:
λ_1 := ω_n*(-ζ + sqrt(ζ^2 - 1 s^2))
λ_1 = -1
λ_2 := ω_n*(-ζ - sqrt(ζ^2 - 1 s^2))
λ_2 = -1
# Now assume that the boundary conditions of the system are that the mass is extended 1 foot and held constant so there is no initial velocity and then it is let go. This would mean that:
y(0) == 1*ft
d/dt(y(0)) == 0*ft/s
# The constants of integration would then be:
a_1 := 1
a_2 := -λ_1
y(t) := (a_1 + a_2*t)*e^(λ_1*t)
y(0) = 1
y(2) = 0.406006
t := 0, 0.1 .. 10
# [plot: y(t) vs t]
# Now calculate how long it takes for the mass to return to 90% of the original position.
# UNDER DAMPED SOLUTION:
#
# 2 complex roots: This is when the damping in the system is relatively less than the mass and springs. The system is considered to be under damped.
#
# Assume the values of the physical system are:
M := 1 lb*s^2/ft
C := 1 lb*s/ft
K := 1 lb/ft
# Therefore:
ω_n := sqrt(K/M)
ω_n = 1 1/s
ζ := 1/2*C/K
ζ = 0.5 s
# The quadratic equations now become:
λ_1 := ω_n*(-ζ + sqrt(ζ^2 - 1 s^2))
λ_2 := ω_n*(-ζ - sqrt(ζ^2 - 1 s^2))
λ_1 = -0.5 + 0.866025i
λ_2 = -0.5 - 0.866025i
# Let a be the real part of the roots and b be the imaginary part
a := -.5
b := .866
# Now assume that the boundary conditions of the system are that the mass is extended 1 foot and held constant so there is no initial velocity and then it is let go. This would mean that:
y(0) == 1*ft
d/dt(y(0)) == 0*ft/s
# The constants of integration would then be:
A := 1
B := 0
# The final complete solution would be:
y(t) := e^(a*t)*(A*cos(b*t) + B*sin(b*t))
# Let us define the exponential part of this function for plotting purposes:
g(t) := e^(a*t)
# [plot: g(t), y(t), -g(t) vs t]
# Now calculate how long it takes for the mass to return to 90% of the original position.
# Now using these plots and equations design your best suspension by defining the ratios between the mass M, the damping C, and the spring constant K.
M == 4, 000*lbs .. □
C == ?
K == ?
# Assume your car weighs approximately 4,000 lbs. Convert the values you chose for C and K into values with appropriate units and check on the internet for possible units you could purchase that would allow you to create this suspension.
